*Heading
** Job name: Cu-Ni-PI_Journal-2_9-20 Model name: Cu-Ni-PI_Journal-2
** Generated by: Abaqus/CAE 2023
*Preprint, echo=NO, model=NO, history=NO, contact=NO
**
** PARTS
**
*Part, name=Layer1
*End Part
**
*Part, name=Layer2
*End Part
**
*Part, name=Layer3
*End Part
**
*Part, name=Layer4
*End Part
**
**
** ASSEMBLY
**
*Assembly, name=Assembly
**
*Instance, name=Layer1-1, part=Layer1
*Node
      1,         150.,           0.,  0.387500018
      2,           0.,           0.,  0.387500018
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*Element, type=S3
 1, 602, 588, 516
 2, 824, 784, 782
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*Element, type=S4R
 10, 285, 198, 326, 328
 11, 161, 168, 198, 285
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*Nset, nset=_PickedSet4, internal, generate
   1,  920,    1
*Elset, elset=_PickedSet4, internal, generate
   1,  870,    1
** Section: Section-Layer-1
*Shell Section, elset=_PickedSet4, material=Si-Same
0.775, 5
*End Instance
**
*Instance, name=Layer2-1, part=Layer2
          0.,           0.,        0.775
*Node
      1,         150.,           0., 0.00306745013
      2,           0.,           0., 0.00306745013
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*Element, type=S3
 1, 602, 588, 516
 2, 824, 784, 782
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*Element, type=S4R
 10, 285, 198, 326, 328
 11, 161, 168, 198, 285
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*Nset, nset=_PickedSet4, internal, generate
   1,  920,    1
*Elset, elset=_PickedSet4, internal, generate
   1,  870,    1
** Section: Section-Layer-2
*Shell Section, elset=_PickedSet4, material=Ubump-top_Mix
0.0061349, 5
*End Instance
**
*Instance, name=Layer3-1, part=Layer3
          0.,           0., 0.781134900346109
*Node
      1,         150.,           0., 0.0500000007
      2,           0.,           0., 0.0500000007
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*Element, type=S3
 1, 602, 588, 516
 2, 824, 784, 782
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*Element, type=S4R
 10, 285, 198, 326, 328
 11, 161, 168, 198, 285
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*Nset, nset=_PickedSet4, internal, generate
   1,  920,    1
*Elset, elset=_PickedSet4, internal, generate
   1,  870,    1
** Section: Section-Layer-3
*Shell Section, elset=_PickedSet4, material=Si-Same
0.1, 5
*End Instance
**
*Instance, name=Layer4-1, part=Layer4
          0.,           0., 0.881134900346109
*Node
      1,         150.,           0., 0.00286777224
      2,           0.,           0., 0.00286777224
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*Element, type=S3
 1, 602, 588, 516
 2, 824, 784, 782
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*Element, type=S4R
 10, 285, 198, 326, 328
 11, 161, 168, 198, 285
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*Nset, nset=_PickedSet4, internal, generate
   1,  920,    1
*Elset, elset=_PickedSet4, internal, generate
   1,  870,    1
** Section: Section-Layer-4
*Shell Section, elset=_PickedSet4, material=Ubump-bottom_Mix
0.00573554, 5
*End Instance
**
*Nset, nset=_PickedSet19, internal, instance=Layer1-1
  1,  2, 14, 15, 16, 17
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*Elset, elset=_PickedSet19, internal, instance=Layer1-1
  12,  13,  15,  18,  19,  20
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*Nset, nset=_PickedSet20, internal, instance=Layer2-1
  1,  2, 14, 15, 16, 17
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*Elset, elset=_PickedSet20, internal, instance=Layer2-1
  12,  13,  15,  18,  19,  20
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*Nset, nset=_PickedSet21, internal, instance=Layer3-1
  1,  2, 14, 15, 16, 17
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*Elset, elset=_PickedSet21, internal, instance=Layer3-1
  12,  13,  15,  18,  19,  20
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*Nset, nset=_PickedSet22, internal, instance=Layer4-1
  1,  2, 14, 15, 16, 17
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*Elset, elset=_PickedSet22, internal, instance=Layer4-1
  12,  13,  15,  18,  19,  20
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*Nset, nset=_PickedSet23, internal, instance=Layer1-1
   2,  13,  79,  80,  81,  82
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*Elset, elset=_PickedSet23, internal, instance=Layer1-1
  37,  47,  79,  85,  86,  88
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*Nset, nset=_PickedSet24, internal, instance=Layer2-1
   2,  13,  79,  80,  81,  82
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*Elset, elset=_PickedSet24, internal, instance=Layer2-1
  37,  47,  79,  85,  86,  88
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*Nset, nset=_PickedSet25, internal, instance=Layer3-1
   2,  13,  79,  80,  81,  82
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*Elset, elset=_PickedSet25, internal, instance=Layer3-1
  37,  47,  79,  85,  86,  88
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*Nset, nset=_PickedSet26, internal, instance=Layer4-1
   2,  13,  79,  80,  81,  82
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*Elset, elset=_PickedSet26, internal, instance=Layer4-1
  37,  47,  79,  85,  86,  88
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*Nset, nset=_PickedSet27, internal, instance=Layer1-1
 2,
*Nset, nset=_PickedSet28, internal, instance=Layer1-1, generate
   1,  920,    1
*Elset, elset=_PickedSet28, internal, instance=Layer1-1, generate
   1,  870,    1
*Nset, nset=_PickedSet29, internal, instance=Layer2-1, generate
   1,  920,    1
*Elset, elset=_PickedSet29, internal, instance=Layer2-1, generate
   1,  870,    1
*Nset, nset=_PickedSet30, internal, instance=Layer3-1, generate
   1,  920,    1
*Elset, elset=_PickedSet30, internal, instance=Layer3-1, generate
   1,  870,    1
*Nset, nset=_PickedSet31, internal, instance=Layer4-1, generate
   1,  920,    1
*Elset, elset=_PickedSet31, internal, instance=Layer4-1, generate
   1,  870,    1
*Elset, elset=__PickedSurf13_SPOS, internal, instance=Layer1-1, generate
   1,  870,    1
*Surface, type=ELEMENT, name=_PickedSurf13, internal
__PickedSurf13_SPOS, SPOS
*Elset, elset=__PickedSurf14_SNEG, internal, instance=Layer2-1, generate
   1,  870,    1
*Surface, type=ELEMENT, name=_PickedSurf14, internal
__PickedSurf14_SNEG, SNEG
*Elset, elset=__PickedSurf15_SPOS, internal, instance=Layer2-1, generate
   1,  870,    1
*Surface, type=ELEMENT, name=_PickedSurf15, internal
__PickedSurf15_SPOS, SPOS
*Elset, elset=__PickedSurf16_SNEG, internal, instance=Layer3-1, generate
   1,  870,    1
*Surface, type=ELEMENT, name=_PickedSurf16, internal
__PickedSurf16_SNEG, SNEG
*Elset, elset=__PickedSurf17_SPOS, internal, instance=Layer3-1, generate
   1,  870,    1
*Surface, type=ELEMENT, name=_PickedSurf17, internal
__PickedSurf17_SPOS, SPOS
*Elset, elset=__PickedSurf18_SNEG, internal, instance=Layer4-1, generate
   1,  870,    1
*Surface, type=ELEMENT, name=_PickedSurf18, internal
__PickedSurf18_SNEG, SNEG
** Constraint: Constraint-1
*Tie, name=Constraint-1, adjust=yes
_PickedSurf14, _PickedSurf13
** Constraint: Constraint-2
*Tie, name=Constraint-2, adjust=yes
_PickedSurf16, _PickedSurf15
** Constraint: Constraint-3
*Tie, name=Constraint-3, adjust=yes
_PickedSurf18, _PickedSurf17
*End Assembly
**
** MATERIALS
**
*Material, name=Si-Same
*Density
 2.329e-09,
*Elastic
170000., 0.278
*Expansion
 2.813e-06, 25.
 3.107e-06,150.
*Material, name=Ubump-bottom_Mix
*Elastic, type=ENGINEERING CONSTANTS
 2981.51,  2981.51,  6443.18, 0.292678, 0.137816, 0.137816,  1153.23,   1109.5
   1109.5,
*Expansion, type=ORTHO
 5.8998e-05,  5.8998e-05, 2.83323e-05
*Material, name=Ubump-top_Mix
*Elastic, type=ENGINEERING CONSTANTS
 3745.32,   3745.32,   19440.7,  0.267059, 0.0516224, 0.0516224,   1477.96,   1393.38
   1393.38,
*Expansion, type=ORTHO
 5.25646e-05, 5.25646e-05, 1.89236e-05
**
** PHYSICAL CONSTANTS
**
*Physical Constants, absolute zero=-272.15
**
** BOUNDARY CONDITIONS
**
** Name: BC-Fix_middle_point Type: 位移/转角
*Boundary
_PickedSet27, 3, 3
** Name: BC-X_Layer-1 Type: 对称/反对称/完全固定
*Boundary
_PickedSet23, XSYMM
** Name: BC-X_Layer-2 Type: 对称/反对称/完全固定
*Boundary
_PickedSet24, XSYMM
** Name: BC-X_Layer-3 Type: 对称/反对称/完全固定
*Boundary
_PickedSet25, XSYMM
** Name: BC-X_Layer-4 Type: 对称/反对称/完全固定
*Boundary
_PickedSet26, XSYMM
** Name: BC-Y_Layer-1 Type: 对称/反对称/完全固定
*Boundary
_PickedSet19, YSYMM
** Name: BC-Y_Layer-2 Type: 对称/反对称/完全固定
*Boundary
_PickedSet20, YSYMM
** Name: BC-Y_Layer-3 Type: 对称/反对称/完全固定
*Boundary
_PickedSet21, YSYMM
** Name: BC-Y_Layer-4 Type: 对称/反对称/完全固定
*Boundary
_PickedSet22, YSYMM
**
** PREDEFINED FIELDS
**
** Name: Predefined-Temp_Layer1   Type: Temperature
*Initial Conditions, type=TEMPERATURE
_PickedSet28, 200.
** Name: Predefined-Temp_Layer2   Type: Temperature
*Initial Conditions, type=TEMPERATURE
_PickedSet29, 200.
** Name: Predefined-Temp_Layer3   Type: Temperature
*Initial Conditions, type=TEMPERATURE
_PickedSet30, 200.
** Name: Predefined-Temp_Layer4   Type: Temperature
*Initial Conditions, type=TEMPERATURE
_PickedSet31, 200.
** ----------------------------------------------------------------
**
** STEP: Contact
**
*Step, name=Contact, nlgeom=YES, inc=1000
*Static
0.01, 0.1, 1e-06, 0.1
**
** OUTPUT REQUESTS
**
*Restart, write, frequency=0
**
** FIELD OUTPUT: F-Output-1
**
*Output, field, variable=PRESELECT
**
** HISTORY OUTPUT: H-Output-1
**
*Output, history, variable=PRESELECT
*End Step
** ----------------------------------------------------------------
**
** STEP: T_down
**
*Step, name=T_down, nlgeom=YES, inc=1000
*Static
0.01, 1., 1e-06, 1.
**
** PREDEFINED FIELDS
**
** Name: Predefined-Temp_Layer1   Type: Temperature
*Temperature
_PickedSet28, 25.
** Name: Predefined-Temp_Layer2   Type: Temperature
*Temperature
_PickedSet29, 25.
** Name: Predefined-Temp_Layer3   Type: Temperature
*Temperature
_PickedSet30, 25.
** Name: Predefined-Temp_Layer4   Type: Temperature
*Temperature
_PickedSet31, 25.
**
** OUTPUT REQUESTS
**
*Restart, write, frequency=0
**
** FIELD OUTPUT: F-Output-1
**
*Output, field, variable=PRESELECT
**
** HISTORY OUTPUT: H-Output-1
**
*Output, history, variable=PRESELECT
*End Step
